# ТР-12 Ковальов Олександр, варіант 22
var := 22
α := 0.25*|var - 25| = 0.75
β := 0.35*(var - 21) = 0.35
A := [
    5.18 + α, 1.12, 0.95, 1.32, 0.83;
    1.12, 4.28 - α, 2.12, 0.57, 0.91;
    0.95, 2.12, 6.13 + α, 1.29, 1.57;
    1.32, 0.57, 1.29, 4.57 - α, 1.25;
    0.83, 0.91, 1.57, 1.25, 5.21 + α
] = [
    5.93, 1.12, 0.95, 1.32, 0.83;
    1.12, 3.53, 2.12, 0.57, 0.91;
    0.95, 2.12, 6.88, 1.29, 1.57;
    1.32, 0.57, 1.29, 3.82, 1.25;
    0.83, 0.91, 1.57, 1.25, 5.96
]
B := [6.19 + β; 3.21; 4.28 - β; 6.25; 4.95 + β] = [6.54; 3.21; 3.93; 6.25; 5.3]
Xm := A^-1*B = [0.702562; 0.351133; 0.0363497; 1.17074; 0.482693]
X := [0.7026; 0.3511; 0.0363; 1.1707; 0.4827]
dim := 5
# // Розмірність
r := B - A*Xm = [8.88178e-16; 0; 4.44089e-16; 8.88178e-16; 8.88178e-16]
δ := sqrt((1/dim)*sum((X[k] - Xm[k])^2, k = 0 .. dim - 1)) = 3.58075e-5
