# Завдання 2:
Start := 0
End := 2
N := 100
f1(x, y1, y2) := atan(x^2 + y2^2)
f2(x, y1, y2) := sin(x + y1)
x0 := 0
y10 := 0.5
y20 := 1.5
solve block
    # constraints
    y1'(x) == f1(x, y1(x), y2(x))
    y2'(x) == f2(x, y1(x), y2(x))
    y1(x0) == y10
    y2(x0) == y20
    # solver
    [y1; y2] := Odesolve([y1(x); y2(x)], End)
end solve block
# [plot: y1(x), y2(x) vs x]
x := Start .. End
Conditions := [y10; y20]
System(x, Y) := [atan(x^2 + Y[0]); sin(x + Y[1])]
Matrix := rkfixed(Conditions, Start, End, N, System)
# [plot: Matrix[:, 1], Matrix[:, 2] vs Matrix[:, 0]]
Matrix = [
    0, 0.5, 1.5;
    0.02, 0.509349, 1.51997;
    0.04, 0.518861, 1.53997;
    0.06, 0.528549, 1.55996;
    0.08, 0.538427, 1.57991;
    0.1, 0.548508, 1.59979;
    0.12, 0.558806, 1.61957;
    0.14, 0.569332, 1.63921;
    0.16, 0.580099, 1.65869;
    0.18, 0.59112, 1.67798
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]
MatrixBul := Bulstoer(Conditions, Start, End, N, System)
# [plot: MatrixBul[:, 1], MatrixBul[:, 2] vs MatrixBul[:, 0]]
MatrixBul = [
    0, 0.5, 1.5;
    0.02, 0.509349, 1.51997;
    0.04, 0.518861, 1.53997;
    0.06, 0.528549, 1.55996;
    0.08, 0.538427, 1.57991;
    0.1, 0.548508, 1.59979;
    0.12, 0.558806, 1.61957;
    0.14, 0.569332, 1.63921;
    0.16, 0.580099, 1.65869;
    0.18, 0.59112, 1.67798
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]
