# ТР-12 Ковальов Олександр, варіант 22
A := [8, 0.14, 2.62, 1.54; 0.15, 1.24, 0.74, 0.18; 2.72, -1.47, 2.86, 1.02; 1.91, 1.17, 0.25, 6.63]
B := [-4.17; -3.24; 38.13; -1.87]
Xm := A^-1*B = [-4.76449; -9.59604; 12.1011; 2.32764]
X := [-4.764; -9.596; 12.101; 2.3276]
dim := 4
r := B - A*Xm = [3.55271e-15; 2.22045e-15; 7.10543e-15; 6.21725e-15]
δ := sqrt((1/dim)*sum((X[k] - Xm[k])^2, k = 0 .. dim - 1)) = 0.000247678
