# ТР-12 Ковальов Олександр, варіант 22
# Метод бісекції:
x := 1.14666748047
x_m := 1.14669104896
δ := sqrt((x - x_m)^2) = 2.35685e-5
# Метод хорд:
x := 1.14670250608
x_m := 1.14669104896
δ := sqrt((x - x_m)^2) = 1.14571e-5
# Метод Ньютона:
x := 1.14668752697
x_m := 1.14669104896
δ := sqrt((x - x_m)^2) = 3.52198e-6
