function(x, y) := x^2 - x - cos(5*x) + cos(2*y)
# [3D plot: function]
a := 0
b := 5
∂/∂x(function(x, y)) → 5*sin(5*x) + (2*x - 1)
∂/∂y(function(x, y)) → -(2*sin(2*y))
df_dx(x) := 5*sin(5*x) + (2*x - 1)
df_dy(y) := -(2*sin(2*y))
x := a .. b
y := a .. b
# [plot: df_dx(x) vs x]
# [plot: df_dy(y) vs y]
x_values := [0, 1, 2, 3, 4, 5]
funmap(x_values, df_dx) = [-1, -3.79462, 0.279894, 8.25144, 11.5647, 8.33824]
y_values := [0, 1, 2, 3, 4, 5]
funmap(y_values, df_dy) = [0, -1.81859, 1.5136, 0.558831, -1.97872, 1.08804]
