a := 0
b := 1
result := integral(x^2*sqrt(1 - x^2), x = a .. b) = 0.19635
TrapezoidResult := 0.19629823
ErrorTrapezoid := |TrapezoidResult - result| = 5.13483e-5
GaussResult := 0.196370237639
ErrorGauss := |GaussResult - result| = 2.06594e-5
