# Завдання 1:
f(x, y) := y*ln(y) + x*y^-1
a := 0
b := 3
x0 := 1
y0 := e
x1 := b
N := 100
solve block
    # constraints
    y'(x) == f(x, y(x))
    y(x0) == y0
    # solver
    y := odesolve(y(x), b)
end solve block
# [plot: y(x) vs x]
x := a .. b
y := rkfixed(y0, 1, 3, N, f)
# [plot: y[:, 1] vs y[:, 0]]
y = [
    1, 2.71828;
    1.02, 2.78125;
    1.04, 2.84679;
    1.06, 2.91504;
    1.08, 2.98614;
    1.1, 3.06023;
    1.12, 3.13748;
    1.14, 3.21807;
    1.16, 3.30216;
    1.18, 3.38997
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]
y := Bulstoer(y0, 1, 3, N, f)
# [plot: y[:, 1] vs y[:, 0]]
y = [
    1, 2.71828;
    1.02, 2.78125;
    1.04, 2.84679;
    1.06, 2.91504;
    1.08, 2.98614;
    1.1, 3.06023;
    1.12, 3.13748;
    1.14, 3.21807;
    1.16, 3.30216;
    1.18, 3.38997
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]
