# Завдання 3:
Start := 0
End := 5
N := 100
f1(x, y1, y2) := y2
f2(x, y1, y2) := 3*x^2
x0 := Start
y10 := 2
y20 := 1
solve block
    # constraints
    y1'(x) == f1(x, y1(x), y2(x))
    y2'(x) == f2(x, y1(x), y2(x))
    y1(x0) == y10
    y2(x0) == y20
    # solver
    [y1; y2] := Odesolve([y1(x); y2(x)], End)
end solve block
# [plot: y1(x), y2(x) vs x]
x := Start .. End
Conditions := [y10; y20]
System(x, Y) := [Y[0]; 3*x^2]
Matrix := rkfixed(Conditions, Start, End, N, System)
# [plot: Matrix[:, 1], Matrix[:, 2] vs Matrix[:, 0]]
Matrix = [
    0, 2, 1;
    0.05, 2.10254, 1.00012;
    0.1, 2.21034, 1.001;
    0.15, 2.32367, 1.00337;
    0.2, 2.44281, 1.008;
    0.25, 2.56805, 1.01562;
    0.3, 2.69972, 1.027;
    0.35, 2.83814, 1.04287;
    0.4, 2.98365, 1.064;
    0.45, 3.13662, 1.09113
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]
MatrixBul := Bulstoer(Conditions, Start, End, N, System)
# [plot: MatrixBul[:, 1], MatrixBul[:, 2] vs MatrixBul[:, 0]]
MatrixBul = [
    0, 2, 1;
    0.05, 2.10254, 1.00013;
    0.1, 2.21034, 1.001;
    0.15, 2.32367, 1.00338;
    0.2, 2.44281, 1.008;
    0.25, 2.56805, 1.01563;
    0.3, 2.69972, 1.027;
    0.35, 2.83814, 1.04287;
    0.4, 2.98365, 1.064;
    0.45, 3.13662, 1.09112
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]
